# p - вероятность выпадения 1
# k - оценка вероятности выпадения 1
# энтропия одного бита:
en(p) := -1/ln(2)*(p*ln(p) + (1 - p)*ln(1 - p))
# энтропиия второго бита
en2(p, k) := -1/ln(2)*(p*(p*ln(k) + (1 - p)*ln(1 - k)) + (1 - p)*(p*ln(1 - k) + (1 - p)*ln(k)))
i := 0.1, 0.11 .. 0.9
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